// SBML level 2 version 4

model M1()

  // Compartments:
  compartment C20 = 1;
  compartment CXX = 0;

  // Species:
  species S12 in C20 = 0; S12 is "P680 / Qa / PhD1 / ac / ChlD1";
  species S14 in C20 = 0; S14 is "P680 / Qa / PhD1 / ac / ChlD1*";
  species S13 in C20 = 1; S13 is "P680 / Qa / PhD1 / ac* / ChlD1";
  species S15 in C20 = 0; S15 is "P680 / Qa / PhD1- / ac / ChlD1+";
  species S16 in C20 = 0; S16 is "P680+ / Qa / PhD1- / ac / ChlD1";
  species S17 in C20 = 0; S17 is "P680+ / Qa- / PhD1 / ac / ChlD1";
  species F_t in CXX; F_t is "F(t)";

  // Parameters:
  kF = 67000000;

  // Assignment rules:
  F_t := kF*(S13 + S14);

  // Reactions:
  R1: S13 => S12; kF*S13;
  R123: S13 => S12; k552*S13;
    k552 = 200000;
  R5: S15 => S14; k535*S15;
    k535 = 500000000000;
  R6: S15 => S16; k538*S15;
    k538 = 250000000000;
  R2: S13 -> S14; k526*S13 - k561*S14;
    k526 = 19200000000; k561 = 25000000000;
  R7: S14 => S15; k541*S14;
    k541 = 500000000000;
  R9: S16 => S17; k547*S16;
    k547 = 4800000000;
  R4: S14 => S12; kF*S14;
  R124: S14 => S12; k556*S14;
    k556 = 200000;
  R10: S16 => S15; k550*S16;
    k550 = 67000000000;
  R8: S17 => S16; k544*S17;
    k544 = 2400000000;
end
