// SBML level 2 version 4

model M19()

  // Compartments:
  compartment C1105 = 1;
  compartment CXX = 0;

  // Species:
  species S1142 in C1105 = 0; S1142 is "bL-/bH.c-/f";
  species S1143 in C1105 = 0; S1143 is "bL-/bH.c-/f-";
  species S1140 in C1105 = 0; S1140 is "bL-/bH.c/f";
  species S1141 in C1105 = 0; S1141 is "bL-/bH.c/f-";
  species S1144 in C1105 = 0; S1144 is "bL-/bH.c2-/f";
  species S1145 in C1105 = 0; S1145 is "bL-/bH.c2-/f-";
  species S1137 in C1105 = 0; S1137 is "bL/bH.c-/f";
  species S1146 in C1105 = 0; S1146 is "bL/bH.c-/f-";
  species S1135 in C1105 = 1; S1135 is "bL/bH.c/f";
  species S1136 in C1105 = 0; S1136 is "bL/bH.c/f-";
  species S1138 in C1105 = 0; S1138 is "bL/bH.c2-/f";
  species S1139 in C1105 = 0; S1139 is "bL/bH.c2-/f-";
  species S1121 in C1105 = 3; S1121 is "Fd";
  species S1122 in C1105 = 0; S1122 is "Fd-";
  species S1124 in C1105 = 0; S1124 is "FNRa";
  species S1125 in C1105 = 0; S1125 is "FNRa-";
  species FNRa2 in C1105 = 0; FNRa2 is "FNRa2-";
  species FNRi in C1105 = 3;
  species S1118 in C1105 = 0; S1118 is "P680+/Qa-/N";
  species S1107 in C1105 = 0; S1107 is "P680+/Qa-/Qb";
  species S1108 in C1105 = 0; S1108 is "P680+/Qa-/Qb-";
  species S1109 in C1105 = 0; S1109 is "P680+/Qa-/Qb2-";
  species S1106 in C1105 = 0; S1106 is "P680+/Qa/Qb";
  species S1110 in C1105 = 0; S1110 is "P680+/Qa/Qb-";
  species S1111 in C1105 = 0; S1111 is "P680+/Qa/Qb2-";
  species S1119 in C1105 = 0; S1119 is "P680/Qa-/N";
  species S1113 in C1105 = 0; S1113 is "P680/Qa-/Qb";
  species S1114 in C1105 = 0; S1114 is "P680/Qa-/Qb-";
  species S1115 in C1105 = 0; S1115 is "P680/Qa-/Qb2-";
  species S1120 in C1105 = 0; S1120 is "P680/Qa/N";
  species S1112 in C1105 = 1; S1112 is "P680/Qa/Qb";
  species S1116 in C1105 = 0; S1116 is "P680/Qa/Qb-";
  species S1117 in C1105 = 0; S1117 is "P680/Qa/Qb2-";
  species S1129 in C1105 = 0; S1129 is "P700+/Fb";
  species S1130 in C1105 = 0; S1130 is "P700+/Fb-";
  species S1127 in C1105 = 1; S1127 is "P700/Fb";
  species S1128 in C1105 = 0; S1128 is "P700/Fb-";
  species S1132 in C1105 = 3; S1132 is "Pc";
  species S1131 in C1105 = 0; S1131 is "Pc+";
  species PQ in C1105 = 2.5;
  species PQH in C1105 = 2.5;
  species S0 in C1105 = 0.25;
  species S1 in C1105 = 0.75;
  species S2 in C1105 = 0;
  species S3 in C1105 = 0;
  species Fq_t in CXX; Fq_t is "Fq(t)";
  species Funq_t in CXX; Funq_t is "Funq(t)";
  species I820 in CXX;

  // Parameters:
  k_HC_L = 7; k_HC_L is "k(HC)L";
  k01 = 20000;
  k12 = 10000;
  k23 = 3330;
  k30 = 1000;
  ka = 0.01;
  kAB1 = 3500;
  kAB2 = 1750;
  kb_HC = 10; kb_HC is "kb(HC)";
  kBA1 = 175;
  kBA2 = 35;
  kbB = 250;
  kbct = 100;
  kbF = 10;
  kbFd = 5;
  kbL_F = 10; kbL_F is "kbL,F";
  kbR = 10;
  kbX = 10;
  kf_HC = 100; kf_HC is "kf(HC)";
  kfB = 250;
  kfct = 100;
  kfF = 100;
  kfFd = 5;
  kfL_F = 100; kfL_F is "kfL,F";
  kFNR = 220;
  kfR = 100;
  kfX = 100;
  kL_HC = 2300; kL_HC is "kL(HC)";
  kL1 = 200;
  kL2 = 4000;

  // Assignment rules:
  Fq_t := (1 - 0.55)*((S1107 + S1108 + S1109 + S1115 + S1113 + S1114)/(1 - 0.55*(S1107 + S1108 + S1109 + S1115 + S1113 + S1114)))/(1 + (1/45 + (S1107 + S1108 + S1109 + S1115 + S1113 + S1114)*(4/63))*PQ);
  Funq_t := (1 - 0.55)*((S1107 + S1108 + S1109 + S1115 + S1113 + S1114)/(1 - 0.55*(S1107 + S1108 + S1109 + S1115 + S1113 + S1114)));
  I820 := 10^(-(2.16*10)^(-7*(1590*S1131 + (2.16*10)^(-7*10300*(S1129 + S1130)))));

  // Reactions:
  R374: FNRi => S1124; ka*FNRi;
  R365: S1127 => S1130; kL1*S1127;
  R268: S1112 => S1107; kL2*S1112;
  R269: S1116 => S1108; kL2*S1116;
  R270: S1117 => S1109; kL2*S1117;
  R271: S0 + S1106 => S1 + S1112; k01*S0*S1106;
  R272: S1 + S1106 => S2 + S1112; k12*S1*S1106;
  R273: S2 + S1106 => S3 + S1112; k23*S2*S1106;
  R274: S3 + S1106 => S0 + S1112; k30*S3*S1106;
  R275: S0 + S1118 => S1 + S1119; k01*S0*S1118;
  R277: S0 + S1107 => S1 + S1113; k01*S0*S1107;
  R276: S1 + S1107 => S2 + S1113; k12*S1*S1107;
  R278: S2 + S1107 => S3 + S1113; k23*S2*S1107;
  R279: S3 + S1107 => S0 + S1113; k30*S3*S1107;
  R280: S1 + S1118 => S2 + S1120; k12*S1*S1118;
  R281: S0 + S1110 => S1 + S1116; k01*S0*S1110;
  R282: S1 + S1110 => S2 + S1116; k12*S1*S1110;
  R283: S2 + S1110 => S3 + S1116; k23*S2*S1110;
  R284: S3 + S1110 => S0 + S1116; k30*S3*S1110;
  R285: S2 + S1118 => S3 + S1119; k23*S2*S1118;
  R286: S0 + S1108 => S1 + S1114; k01*S0*S1108;
  R287: S1 + S1108 => S2 + S1114; k12*S1*S1108;
  R288: S2 + S1108 => S3 + S1114; k23*S2*S1108;
  R289: S3 + S1108 => S0 + S1114; k30*S3*S1108;
  R290: S2 + S1118 => S0 + S1119; k1232*S2*S1118;
    k1232 = 1000;
  R291: S0 + S1111 => S1 + S1117; k01*S0*S1111;
  R292: S1 + S1111 => S2 + S1117; k12*S1*S1111;
  R293: S2 + S1111 => S3 + S1117; k23*S2*S1111;
  R294: S3 + S1111 => S0 + S1117; k30*S3*S1111;
  R295: S0 + S1109 => S1 + S1115; k01*S0*S1109;
  R296: S1 + S1109 => S2 + S1115; k12*S1*S1109;
  R297: S2 + S1109 => S3 + S1115; k23*S2*S1109;
  R298: S3 + S1109 => S0 + S1115; k30*S3*S1109;
  R370: S1132 + S1129 -> S1131 + S1127; kfR*S1132*S1129 - kbR*S1131*S1127;
  R372: S1132 + S1130 -> S1131 + S1128; kfR*S1132*S1130 - kbR*S1131*S1128;
  R353: S1136 + S1131 -> S1135 + S1132; kfF*S1136*S1131 - kbF*S1135*S1132;
  R355: S1141 + S1131 -> S1140 + S1132; kfF*S1141*S1131 - kbF*S1140*S1132;
  R357: S1146 + S1131 -> S1137 + S1132; kfF*S1146*S1131 - kbF*S1137*S1132;
  R359: S1143 + S1131 -> S1142 + S1132; kfF*S1143*S1131 - kbF*S1142*S1132;
  R361: S1139 + S1131 -> S1138 + S1132; kfF*S1139*S1131 - kbF*S1138*S1132;
  R363: S1145 + S1131 -> S1144 + S1132; kfF*S1145*S1131 - kbF*S1144*S1132;
  R345: PQ + S1138 -> S1135 + PQH; kf_HC*PQ*S1138 - kb_HC*S1135*PQH;
  R347: PQ + S1144 -> PQH + S1140; kf_HC*PQ*S1144 - kb_HC*PQH*S1140;
  R349: PQ + S1139 -> PQH + S1136; kf_HC*PQ*S1139 - kb_HC*PQH*S1136;
  R351: PQ + S1145 -> PQH + S1141; kf_HC*PQ*S1145 - kb_HC*PQH*S1141;
  R375: S1124 + S1122 -> S1125 + S1121; kfFd*S1124*S1122 - kbFd*S1125*S1121;
  R377: S1125 + S1122 -> S1121 + FNRa2; kfFd*S1125*S1122 - kbFd*S1121*FNRa2;
  R366: S1121 + S1128 -> S1127 + S1122; kfX*S1121*S1128 - kbX*S1127*S1122;
  R368: S1121 + S1130 -> S1129 + S1122; kfX*S1121*S1130 - kbX*S1129*S1122;
  R329: S1122 + S1135 -> S1121 + S1137; kfct*S1122*S1135 - kbct*S1121*S1137;
  R331: S1122 + S1140 -> S1121 + S1142; kfct*S1122*S1140 - kbct*S1121*S1142;
  R333: S1122 + S1136 -> S1121 + S1146; kfct*S1122*S1136 - kbct*S1121*S1146;
  R335: S1122 + S1141 -> S1121 + S1143; kfct*S1122*S1141 - kbct*S1121*S1143;
  R337: S1122 + S1137 -> S1121 + S1138; kfct*S1122*S1137 - kbct*S1121*S1138;
  R339: S1122 + S1142 -> S1121 + S1144; kfct*S1122*S1142 - kbct*S1121*S1144;
  R341: S1122 + S1146 -> S1121 + S1139; kfct*S1122*S1146 - kbct*S1121*S1139;
  R343: S1122 + S1143 -> S1121 + S1145; kfct*S1122*S1143 - kbct*S1121*S1145;
  R315: PQH + S1135 -> PQ + S1141; kfL_F*PQH*S1135 - kbL_F*PQ*S1141;
  R316: PQH + S1137 -> PQ + S1143; kfL_F*PQH*S1137 - kbL_F*PQ*S1143;
  R319: PQH + S1138 -> PQ + S1145; kfL_F*PQH*S1138 - kbL_F*PQ*S1145;
  R321: S1140 -> S1137; kL_HC*S1140 - k_HC_L*S1137;
  R323: S1141 -> S1146; kL_HC*S1141 - k_HC_L*S1146;
  R325: S1142 -> S1138; kL_HC*S1142 - k_HC_L*S1138;
  R327: S1143 -> S1139; kL_HC*S1143 - k_HC_L*S1139;
  R299: S1107 -> S1110; kAB1*S1107 - kBA1*S1110;
  R302: S1113 -> S1116; kAB1*S1113 - kBA1*S1116;
  R304: S1108 -> S1111; kAB2*S1108 - kBA2*S1111;
  R306: S1114 -> S1117; kAB2*S1114 - kBA2*S1117;
  R300: PQ + S1111 -> PQH + S1106; kfB*PQ*S1111 - kbB*PQH*S1106;
  R309: PQ + S1117 -> PQH + S1112; kfB*PQ*S1117 - kbB*PQH*S1112;
  R311: PQ + S1109 -> PQH + S1107; kfB*PQ*S1109 - kbB*PQH*S1107;
  R313: PQ + S1115 -> S1113 + PQH; kfB*PQ*S1115 - kbB*S1113*PQH;
  R379: FNRa2 => S1124; kFNR*FNRa2;
end
